# p - вероятность выпадения 1
# k - оценка вероятности выпадения 1
# энтропия одного бита:
en(p) := -1/ln(2)*(p*ln(p) + (1 - p)*ln(1 - p))
# энтропиия второго бита
en2(p, k) := -1/ln(2)*(p*(p*ln(k) + (1 - p)*ln(1 - k)) + (1 - p)*(p*ln(1 - k) + (1 - p)*ln(k)))
# идеальное k для p, когда en2 = min;
bestk(p) := p^2 + (1 - p)^2
integral(3*x^2*x, x = 0 .. 1) = 0.75
aaa(p, k) := en2(p, k)/en(p)
bestk(0.99) = 0.9802
ina := 0.1
i := ina, ina + 0.001 .. 1 - ina
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# вторая производная по p (p = 0.5) от aaa = 0
aaa(0.2366, 0.82) = 1.36388
aaa(0.2365, 0.82) = 1.36388
aaa(0.2367, 0.82) = 1.36388
eer3(k) := (1/2 - ln(1/2))*ln(k) + (1/2 + ln(1/2))*ln(1 - k)
eer3(0.781) = -0.00159283
eer3(0.782) = 0.000817882
