x := 0.4, 0.401 .. 0.6
i(x) := -1/ln(2)*(x*ln(x) + (1 - x)*ln(1 - x))
i2(x, k) := -1/ln(2)*(x*(x*ln(k) + (1 - x)*ln(1 - k)) + (1 - x)*(x*ln(1 - k) + (1 - x)*ln(k)))
xx1(x, k) := -1/ln(2)*sum(sum(x^(i + v)*(1 - x)^((1 - i) + (1 - v))*ln([1 - k; k][i*v + (1 - i)*(1 - v)]), v = 0 .. 1), i = 0 .. 1)
i4(x, k) := -1/ln(2)*(x*(x*(x*ln(k) + (1 - x)*ln(1 - k)) + (1 - x)*ln(0.5)) + (1 - x)*(x*ln(0.5) + (1 - x)*(x*ln(1 - k) + (1 - x)*ln(k))))
xx2(x, k) := -1/ln(2)*sum(sum(sum(x^(i + j + v)*(1 - x)^((1 - i) + (1 - j) + (1 - v))*ln([1 - k; 0.5; k][(i + j)*v + (2 - (i + j))*(1 - v)]), v = 0 .. 1), j = 0 .. 1), i = 0 .. 1)
i1 := 0.45, 0.451 .. 0.55
xx3(x, k, k2) := -1/ln(2)*sum(sum(sum(sum(x^(i + j + p + v)*(1 - x)^((1 - i) + (1 - j) + (1 - p) + (1 - v))*ln([1 - k2; 1 - k; k; k2][(i + j + p)*v + (3 - (i + j + p))*(1 - v)]), v = 0 .. 1), p = 0 .. 1), j = 0 .. 1), i = 0 .. 1)
i(0.01) = 0.0807931
i6(x, k1, k2) := (i2(x, k1) + i4(x, k2))/(2*i(x))
i3(x, k) := i2(x, k)/i(x)
i33(x, k) := xx1(x, k)/i(x)
0.7816
i5(x, k) := i4(x, k)/i(x)
i55(x, k) := xx2(x, k)/i(x)
i77(x, k, k2) := xx3(x, k, k2)/i(x)
di3(x, k) := i3(x, k) - i3(0.5, k)
i3(0.5, 0.782) = 1.27618
i333(x, k) := xx1(x, k) - i(x)
i4(0.5, 0.8) = 1.16096
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ee1 := 0.6
ee2 := 0.8697
nnn := 10000
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5/6 = 0.833333
1/nnn*sum(i3((i - 0.5)/nnn, 0.68), i = 1 .. nnn) = 2.04344
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i77(0.5, 0.6, 0.87) = 1.16513
i77(0.5, 0.61, 0.83) = 1.12999
i77(0.5, 0.62, 0.8) = 1.11258
i77(0.5, 0.63, 0.78) = 1.10573
i77(0.5, 0.64, 0.75) = 1.09605
i77(0.5, 0.65, 0.73) = 1.0939
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