i11(x, k) := -1/ln(2)*(x*ln(k) + (1 - x)*ln(1 - k))
i(x) := -1/ln(2)*(x*ln(x) + (1 - x)*ln(1 - x))
i2(x, k) := -1/ln(2)*(x*(x*ln(k) + (1 - x)*ln(1 - k)) + (1 - x)*(x*ln(1 - k) + (1 - x)*ln(k)))
xx1(x, k) := -1/ln(2)*sum(sum(x^(i + v)*(1 - x)^((1 - i) + (1 - v))*ln([1 - k; k][i*v + (1 - i)*(1 - v)]), v = 0 .. 1), i = 0 .. 1)
i4(x, k) := -1/ln(2)*(x*(x*(x*ln(k) + (1 - x)*ln(1 - k)) + (1 - x)*ln(0.5)) + (1 - x)*(x*ln(0.5) + (1 - x)*(x*ln(1 - k) + (1 - x)*ln(k))))
xx2(x, k) := -1/ln(2)*sum(sum(sum(x^(i + j + v)*(1 - x)^((1 - i) + (1 - j) + (1 - v))*ln([1 - k; 0.5; k][(i + j)*v + (2 - (i + j))*(1 - v)]), v = 0 .. 1), j = 0 .. 1), i = 0 .. 1)
x := 0, 0.001 .. 1
xx3(x, k, k2) := -1/ln(2)*sum(sum(sum(sum(x^(i + j + p + v)*(1 - x)^((1 - i) + (1 - j) + (1 - p) + (1 - v))*ln([1 - k2; 1 - k; k; k2][(i + j + p)*v + (3 - (i + j + p))*(1 - v)]), v = 0 .. 1), p = 0 .. 1), j = 0 .. 1), i = 0 .. 1)
i3(x, k) := i2(x, k) - i(x)*1
i5(x, k) := i4(x, k) - i(x)
i77(x, k, k2) := xx3(x, k, k2) - i(x)
i3(0.5, 0.8) = 0.321928
i77(0.55, 0.57, 0.77) = 0.0737947
i333(x, k) := xx1(x, k) - i(x)
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i77(0.0001, 0.53, 0.885) = 0.175294
i77(0.35, 0.53, 0.885) = 0.165868
i77(0.0001, 0.53, 0.889) = 0.168796
i77(0.35, 0.53, 0.889) = 0.170942
i77(1*10^-20, 0.533, 0.889) = 0.169745
i77(0.35, 0.533, 0.889) = 0.170782
i77(1*10^-20, 0.5306, 0.8886) = 0.170394
i77(0.35, 0.5306, 0.8886) = 0.170389
